#INIT: cooling rate 100K/ps
units metal
dimension 3
atom_style charge #atomic
boundary p p p
neighbor 2.0 bin
neigh_modify delay 1 #check yes one 1000 page 2000


#SYS DEF
region box block 0 40 0 40 0 40
create_box 2 box

create_atoms 1 random 2000 SEED1 box #Al
create_atoms 2 random 3000 SEED2 box #O

mass 1 26.9815
mass 2 15.9994
set atom 1 charge 1.4175
set atom 2 charge -0.9450

#potential config
pair_style born/coul/long 10.0
pair_coeff 1 1 0.00294848 0.068 1.5704 14.561856 0.0
pair_coeff 1 2 0.00745792 0.172 2.6067 35.836056 0.0
pair_coeff 2 2 0.01196736 0.276 3.6430 88.190881 0.0

kspace_style pppm 1.0e-4


#minimize energy so there is no overlap
timestep 0.0005
minimize 1.0e-4 1.0e-6 10000 100000


#SIMULATION
dump dmp all atom 1000 a_al2o3_NUMBER_ID_dump.lammpstrj
dump f all custom 1000 a_al2o3_NUMBER_ID.* id type x y z fx fy fz
thermo 1000
thermo_style custom step temp press density ke pe etotal
thermo_modify lost ignore


#RUN
#heating
timestep 0.001 #picoseconds
velocity all create 5000 SEED1

fix 1 all nvt temp 5000 5000 0.1
fix 2 all deform 1 x final 0 38.8789 y final 0 38.8789 z final 0 38.8789 units box
run 10000

unfix 2
unfix 1
fix 1 all nvt temp 5000 3000 0.1
run 20000 #100K/ps cooling

unfix 1
fix 1 all nvt temp 3000 3000 0.1
fix 2 all deform 1 x final 0 38.8789 y final 0 38.8789 z final 0 38.8789 units box
run 10000

unfix 1
unfix 2
fix 1 all nvt temp 3000 3000 0.1
run 10000

unfix 1
fix 1 all nvt temp 3000 300 0.1
fix 2 all deform 1 x final 0 31.91 y final 0 31.91 z final 0 31.91 units box
run 270000


unfix 1
unfix 2
fix 1 all nvt temp 300 300 0.1
run 100000

#restart file
write_restart restart.a_al2o3_NUMBER_ID_* #need MPIIO package
